#pair_style meam/c
pair_style meam
pair_coeff * * library-Al.meam Al Al.meam Al

pair_modify shift yes

#min_style adaptglok
#min_style fire
min_style cg
min_modify dmax 0.2 line quadratic
#0.01 quadratic, forcezero, backtrack
#forcezero fastest

thermo_modify   norm no
thermo          100
#thermo_modify lost ignore
thermo_modify flush yes

compute        1 all temp
compute        peratom all stress/atom 1
compute        p_x all reduce sum c_peratom[1]
compute        p_y all reduce sum c_peratom[2]
compute        p_z all reduce sum c_peratom[3]
variable       sigma_x equal -c_p_x/v_vol0/10
variable       sigma_y equal -c_p_y/v_vol0/10
variable       sigma_z equal -c_p_z/v_vol0/10
variable       epsilon_x equal ln(lx/v_lx0)
variable       epsilon_y equal ln(ly/v_ly0)
#variable       epsilon_z equal ln(lz/v_lz0)

compute csym all centro/atom fcc
compute eng all pe/atom

thermo_style custom step temp pe etotal press vol lx ly v_epsilon_x v_sigma_x v_epsilon_y v_sigma_y v_sigma_z
